ORIGIN := 0
parts_price := [14, 4.8, 2.08, 2.14, 1.64, 1.2, 2.21, 2.78, 2, 9.5, 7.8, 4.05, 4.7, 0.16, 0.18, 0.02, 0.02, 0.08, 0.08, 2.25, 2.15, 10, 0.1]
delivery_price := 20
parts_price_sum := sum(parts_price[0, i], i = 0 .. 22)
parts_price_sum = 73.94
Р_к := parts_price_sum + delivery_price = 93.94
# Основная ЗП:
З_о := 57.53
Н_д := 20
Н_н := 150
Num := 500
З_д := З_о*Н_д/100 = 11.506
Р_н := З_о*Н_н/100 = 86.295
Н_соц := 34.6
Р_соц := (З_о + З_д)*Н_соц/100 = 23.8865
Р_м := 0
Н_ком := 5
С_пр := Р_м + Р_к + З_о + З_д + Р_соц + Р_н = 273.157
Р_ком := С_пр*Н_ком/100 = 13.6579
С_п := С_пр + Р_ком = 286.815
Н_ре := 40
П_ед := С_п*Н_ре/100 = 114.726
Ц_отп := С_п + П_ед = 401.541
Н_п := 18
П_ч := Num*П_ед*(1 - Н_п/100) = 47037.7
П_к := Р_к*Num = 46970
П_м := 0
И_об := 30/100*(П_к + П_м) = 14091
И_раз := П_к + П_м
И := И_раз + И_об = 61061
Е_н := 0.12
t_р := 1
a(t) := 1/(1 + Е_н)^(t - t_р)
a_t1 := a(1) = 1
a_t2 := a(2) = 0.892857
a_t3 := a(3) = 0.797194
a_t4 := a(4) = 0.71178
П_1 := П_ч = 47037.7
П_2 := П_1*1.2 = 56445.3
П_3 := П_2*1.2 = 67734.3
П_4 := П_3*1.2 = 81281.2
П_ч1 := 0
П_ч2 := П_2 - П_1 = 9407.54
П_ч3 := П_3 - П_2 = 11289.1
П_ч4 := П_4 - П_3 = 13546.9
П_чt1 := П_ч1*a_t1 = 0
П_чt2 := П_ч2*a_t2 = 8399.59
Прир_1 := Num = 500
П_чt3 := П_ч3*a_t3 = 8999.56
Прир_2 := Прир_1*1.2 = 600
П_чt4 := П_ч4*a_t4 = 9642.39
Прир_3 := Прир_2*1.2 = 720
Прир_4 := Прир_3*1.2 = 864
И_об1 := Прир_1*0.3*Р_к = 14091
И_об2 := Прир_2*0.3*Р_к = 16909.2
И_об3 := Прир_3*0.3*Р_к = 20291
И_об4 := Прир_4*0.3*Р_к = 24349.2
И_1 := И + И_об1 = 75152
И_t1 := И_1*a_t1 = 75152
И_t2 := И_1*a_t2 = 67100
И_t3 := И_1*a_t3 = 59910.7
И_t4 := И_1*a_t4 = 53491.7
ЧДД_1 := a_t1*(П_1 - И_t1) = -28114.3
ЧДД_2 := a_t2*(П_2 - И_t2) = -9513.16
ЧДД_3 := a_t3*(П_3 - И_t3) = 6236.92
ЧДД_4 := a_t4*(П_4 - И_t4) = 19780
П_чср := (П_1 + П_2 + П_3 + П_4)/4 = 63124.6
Р_и := П_чср/(И_t1 + И_t2 + И_t3 + И_t4)*100 = 24.6914
