ORIGIN := 0
# Стоимость комплектующих:
parts_price := [
    6.7, 5, 6.5, 0.66, 1, 3.12, 2.14, 1.64, 1.2, 2.21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]
delivery_price := 20
parts_price_sum := sum(parts_price[0, i], i = 0 .. 41) = 103.05
parts_price_sum := parts_price_sum + 30 = 133.05  # - because of new element....
Р_к := parts_price_sum + delivery_price = 153.05
# Расчет ЗП:
З_о := 18.24
Н_д := 70
Н_н := 150
Num := 500
З_д := З_о*Н_д/100 = 12.768
Р_н := З_о*Н_н/100 = 27.36
Н_соц := 35
Р_соц := (З_о + З_д)*Н_соц/100 = 10.8528
Н_ком := 5
С_пр := Р_к + З_о + З_д + Р_соц + Р_н = 222.271
Р_ком := С_пр*Н_ком/100 = 11.1135
С_п := С_пр + Р_ком = 233.384
Н_ре := 20
П_ед := С_п*Н_ре/100 = 46.6769
Ц_отп := С_п + П_ед = 280.061
# Расчет чистой прибыли:
Н_п := 18
Num_1 := Num = 500
Num_2 := Num_1*1.2 = 600
Num_3 := Num_2*1.2 = 720
Num_4 := Num_3*1.2 = 864
П_ч1 := Num_1*П_ед*(1 - Н_п/100) = 19137.5
П_ч2 := Num_2*П_ед*(1 - Н_п/100) = 22965
П_ч3 := Num_3*П_ед*(1 - Н_п/100) = 27558
П_ч4 := Num_4*П_ед*(1 - Н_п/100) = 33069.6
# Расчет инвестиций в производство нового изделия:
З_о2 := 963.3
Р_м2 := 62.65
З_д2 := З_о2*Н_д/100 = 674.31
Р_соц2 := (З_о2 + З_д2)*Н_соц/100 = 573.163
Р_н2 := З_о2*Н_н/100 = 1444.95
С_р := Р_м2 + З_о2 + З_д2 + Р_соц2 + Р_н2 = 3718.37
И_раз := С_р = 3718.37
П_к := Р_к*Num = 76525
И_об := 20/100*П_к = 15305
И := И_раз + И_об = 19023.4
# Расчет показателей экономической эффективности проекта:
Е_н := 0.12
t_р := 1
a(t) := 1/(1 + Е_н)^(t - t_р)
a_t1 := a(1) = 1
a_t2 := a(2) = 0.892857
a_t3 := a(3) = 0.797194
a_t4 := a(4) = 0.71178
П_чt1 := П_ч1*a_t1 = 19137.5
П_чt2 := П_ч2*a_t2 = 20504.5
П_чt3 := П_ч3*a_t3 = 21969.1
П_чt4 := П_ч4*a_t4 = 23538.3
Прир_1 := Num = 500
Прир_2 := 100
Прир_3 := 120
Прир_4 := 144
И_об1 := Прир_1*0.2*Р_к = 15305
И_об2 := Прир_2*0.2*Р_к = 3061
И_об3 := Прир_3*0.2*Р_к = 3673.2
И_об4 := Прир_4*0.2*Р_к = 4407.84
И_раз = 3718.37
И_1 := И_раз + И_об1 = 19023.4
И_2 := И_об2 = 3061
И_3 := И_об3 = 3673.2
И_4 := И_об4 = 4407.84
И_t1 := И_1*a_t1 = 19023.4
И_t2 := И_2*a_t2 = 2733.04
И_t3 := И_3*a_t3 = 2928.25
И_t4 := И_4*a_t4 = 3137.41
ЧДД_t1 := a_t1*(П_ч1 - И_1) = 114.142
ЧДД_t2 := a_t2*(П_ч2 - И_2) = 17771.4
ЧДД_t3 := a_t3*(П_ч3 - И_3) = 19040.8
ЧДД_t4 := a_t4*(П_ч4 - И_4) = 20400.9
ЧДД_1 := ЧДД_t1 = 114.142
ЧДД_2 := ЧДД_t1 + ЧДД_t2 = 17885.6
ЧДД_3 := ЧДД_2 + ЧДД_t3 = 36926.4
ЧДД_4 := ЧДД_3 + ЧДД_t4 = 57327.3
П_чtср := (П_чt1 + П_чt2 + П_чt3 + П_чt4)/4 = 21287.3
Р_и := П_чtср/(И_t1 + И_t2 + И_t3 + И_t4)*100 = 76.5124
